// COMSOL Multiphysics 6.0.0.405 model "params-1_bem1d_GEF-stimulus.mph"
// Outline of the model tree
// Unit system: none

Parameters
  radius = 3.5
  Dm = 0.01
  Dc = 10
  kD = 0.015
  kdoff = 0.22
  ktG = 0.053
  ktg = 0.35
  kfd = 0.0077
  kbfD = 0.025
  ktD = 0.17
  ktB = 0.68
  kb = 0.032
  kbF = 0.29
  kbf = 0.25
  kF = 0.43
  kf = 0.26
  cellVolume = radius^3*4*pi/3
  nD = 1.5*8690/cellVolume
  nG = (2170)/cellVolume
  nB = 0*1037/cellVolume
  nF = 934/cellVolume
  kFLoc = 1
  TLoc = 1000
  randPert = 0.05

Functions
  rn1: Random | funcname = rand3D; nargs = 3; seed = 113013
  gp1: GaussianPulse | funcname = gaussPulse
  step1: Step | funcname = stepFunc; from = 1; to = 0

Variables
  var1 "Variables 1"
    mtReact = cD*kbfD*mbf + kfd*md*(2.*mbf + mf) - mg*ktG*mt
    mdReact = cD*kD - kdoff*md - kfd*md*(2.*mbf + mf) + cD*ktD*mt + ktg*mtg
    mtgReact = mg*ktG*mt - ktg*mtg
    mbReact = -kb*mb - cF*kbF*mb + kbf*mbf + cB*ktB*mt
    mbfReact = cF*kbF*mb - kbf*mbf
    mfReact = cF*(kF + kFLoc*localPerturbation) - kf*mf
    mgReact = -mg*ktG*mt + ktg*mtg
    cDFlux = -cD*kD - cD*kbfD*mbf + kdoff*md - cD*ktD*mt
    cBFlux = kb*mb - cB*ktB*mt
    cFFlux = -cF*(kF + kFLoc*localPerturbation) - cF*kbF*mb + kbf*mbf + kf*mf
    localPerturbation = if(z >0, gaussPulse((x^2+y^2)/(1.0)^2), 0) * stepFunc(t - TLoc)

Geometry
  geom1 "Geometry 1" (3D, length unit m)
    sph1: Sphere | r = radius
    fin: Finalize "Form Union"

Physics
  g: GeneralFormPDE "Cytosol Dynamics" on all domains
    dependent variable c = {cD, cB, cF}
    ShapeProperty.order = 1
    gfeq1: GeneralFormPDE (default)
      f = {0, 0, 0}
      Ga = {{-Dc*cDx, -Dc*cDy, -Dc*cDz}, {-Dc*cBx, -Dc*cBy, -Dc*cBz}, {-Dc*cFx, -Dc*cFy, -Dc*cFz}}
      da = 1
    zflx1: ZeroFluxBoundary "Zero Flux 1" (default)
    init1: init "Initial Values 1" (default) | cD = nD*(1+randPert*rand3D(x,y,z)); cF = nF; cB = nB
    flux1: FluxBoundary "Flux/Source 1" on all boundaries | g = {cDFlux, cBFlux, cFFlux}
  gb: GeneralFormBoundaryPDE "Membrane Dynamics" on all boundaries
    dependent variable m = {mt, md, mtg, mb, mbf, mf, mg}
    ShapeProperty.order = 1
    gfeq1: GeneralFormPDE (default)
      f = {mtReact, mdReact, mtgReact, mbReact, mbfReact, mfReact, mgReact}
      Ga = 
        {-Dm*mtTx, -Dm*mtTy, -Dm*mtTz}
        {-Dm*mdTx, -Dm*mdTy, -Dm*mdTz}
        {-Dm*mtgTx, -Dm*mtgTy, -Dm*mtgTz}
        {-Dm*mbTx, -Dm*mbTy, -Dm*mbTz}
        {-Dm*mbfTx, -Dm*mbfTy, -Dm*mbfTz}
        {-Dm*mfTx, -Dm*mfTy, -Dm*mfTz}
        {-Dm*mgTx, -Dm*mgTy, -Dm*mgTz}
      da = {1, 0, 0, 0, 0, 0, 0, 0, 1, 0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}
    init1: init "Initial Values 1" (default) | mg = nG*cellVolume/(4*pi*radius^2)

Mesh
  mesh1 "Mesh 1"
    size: MeshSizeDefault | hmax = radius/3; hmin = radius/10; custom = on
    ftri1: FreeTri "Free Triangular 1" on all boundaries
      size1: Size on boundaries 1-8 | hmax = radius/10; custom = on
    ftet1: FreeTet "Free Tetrahedral 1" on remaining entities

Studies
  std1 "Study 1"
    time: Transient "Time Dependent" | tlist = range(0,10,2000); usertol = on; rtol = 1e-5

Solver configurations
  sol1 "Solution 1" (study std1)
    v1: Variables "Dependent Variables 1"
    t1: Time "Time-Dependent Solver 1"
      tlist = range(0,10,2000)
      rtol = 1e-5
      atolglobalvaluemethod = manual
      atolglobal = 1e-4
      dDef: Direct | linsolver = pardiso

Datasets
  mesh1: Mesh
  dset1: Solution | solution = sol1
  cpl1: CutPlane | data = dset1
  cpt1: CutPoint3D | data = dset1; pointx = 0; pointy = 0; pointz = radius; snapping = boundary

Plots
  pg1: PlotGroup3D "Mesh Plot" | data = mesh1
    mesh1: Mesh | data = mesh1; meshdomain = volume
  pg3: PlotGroup3D "Membrane Surface Plot" | data = dset1
    surf1: Surface | expr = mt
  pg6: PlotGroup3D "Stimulus Surface Plot" | data = dset1
    surf1: Surface | expr = localPerturbation
  pg2: PlotGroup3D "Cytosol Slice Plot" | data = dset1
    slc1: Slice | expr = cD; descr = Dependent variable cD
  pg4: PlotGroup2D "Cytosol Cut Plane Plot" | data = cpl1
    surf1: Surface | expr = cD
  pg5: PlotGroup1D "Cap Density Timetrace" | data = cpt1
    ptgr1: PointGraph | expr = mt

Exports
  anim1: Animation | type = imageseq; framesel = all; width = 400; height = 320; synchronize = off